*Heading
** Job name: Job-1 Model name: Model-1
** Generated by: Abaqus/CAE 6.11-3
*Preprint, echo=NO, model=NO, history=NO, contact=NO
**
** PARTS
**
*Part, name=Part-1
*Node
      1,          -5.,          -5.,           0.
      2,          -4.,          -5.,           0.
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*Element, type=M3D4R
  1,   1,   2,  13,  12
  2,   2,   3,  14,  13
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*Nset, nset=_PickedSet2, internal, generate
   1,  121,    1
*Elset, elset=_PickedSet2, internal, generate
   1,  100,    1
** Section: Section-1
*Membrane Section, elset=_PickedSet2, material=Material-1, poisson=0.49
1.,
*End Part
**
**
** ASSEMBLY
**
*Assembly, name=Assembly
**
*Instance, name=Part-1-1, part=Part-1
*End Instance
**
*Nset, nset=_PickedSet4, internal, instance=Part-1-1
   1,  11,  12,  22,  23,  33
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*Elset, elset=_PickedSet4, internal, instance=Part-1-1
   1,  10,  11,  20,  21,  30
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*Nset, nset=_PickedSet5, internal, instance=Part-1-1, generate
  1,  11,   1
*Elset, elset=_PickedSet5, internal, instance=Part-1-1, generate
  1,  10,   1
*Nset, nset=_PickedSet6, internal, instance=Part-1-1, generate
 111,  121,    1
*Elset, elset=_PickedSet6, internal, instance=Part-1-1, generate
  91,  100,    1
*End Assembly
*Amplitude, name=Amp-1
             0.,              0.,             100,             100.
**
** MATERIALS
**
*Material, name=Material-1
*Density
 9.6e-07,
*User Material, constants=5
 0.053,    1.632,    0.001,     0.49, 1.35e-11
**
** BOUNDARY CONDITIONS
**
** Name: BC-1 Type: Displacement/Rotation
*Boundary
_PickedSet4, 1, 1
** Name: BC-2 Type: Displacement/Rotation
*Boundary
_PickedSet5, 1, 1
_PickedSet5, 2, 2
** ----------------------------------------------------------------
**
** STEP: Step-1
**
*Step, name=Step-1
*Dynamic, Explicit, direct user control
1e-04, 40.
*Bulk Viscosity
0.06, 1.2
**
** BOUNDARY CONDITIONS
**
** Name: BC-3 Type: Displacement/Rotation
*Boundary, amplitude=Amp-1
_PickedSet6, 2, 2, 1.
**
** OUTPUT REQUESTS
**
*Restart, write, number interval=1, time marks=NO
**
** FIELD OUTPUT: F-Output-1
**
*Output, field, variable=PRESELECT
**
** HISTORY OUTPUT: H-Output-1
**
*Output, history, variable=PRESELECT
*End Step
